x := 1
y := 2
z := 3
v := 4
w := 5
Given
5*x + 6*y - 9*z + 2*v - 7*w == 90
3*x - 4*y + 5*z + 2*v - 7*w == 12
7*x + 2*y - 8*z + v + 10*w == 51
9*x + y + 3*z - 2*v + 9*w == 32
6*x + 5*y - 4*z + 3*v - 2*w == 87
otvet := Find(x, y, z, v, w)
otvet = [5.73538; 5.75069; -0.644454; 6.27985; -1.20845]
x := 1
y := 2
z := 3
v := 4
w := 5
Given
5.6*x + 7.2*y + 9.8*z + 3.9*v + 3.4*w == 43
4.5*x + 7.9*y - 2.1*v + 6.75*w == 12.54
54.2*x + 76.45*y + 32.23*z + 45.71*v + 43.43*w == 54.98
65.75*x + 54.32*y - 78.32*z - 565.9*v + 32*w == 55.5
5.6*x + 98.5*y + 43.7*z + 67.85*v + 4.9*w == 65.21
otvet := Find(x, y, z, v, w)
otvet = [-4.82754; -1.33754; 6.50014; -1.33489; 6.22626]
ORIGIN := 1
A := [5, 6, -9, 2, -7; 3, -4, 5, 2, -7; 7, 2, -8, 1, 10; 9, 1, 3, -2, 9; 6, 5, -4, 3, -2]
B := [90; 12; 51; 32; 87]
X := A^-1*B
X = [5.73538; 5.75069; -0.644454; 6.27985; -1.20845]
ORIGIN := 1
A := [
    5.6, 7.2, 9.8, 3.9, 3.4;
    4.5, 7.9, 0, -2.1, 6.75;
    54.2, 76.45, 32.23, 45.71, 43.43;
    65.75, 54.32, -78.32, -565.9, 32;
    5.6, 98.5, 43.7, 67.85, 4.9
]
B := [43; 12.54; 54.98; 55.5; 65.21]
X := A^-1*B
X = [-4.82754; -1.33754; 6.50014; -1.33489; 6.22626]
ORIGIN := 1
A := [5, 6, -9, 2, -7; 3, -4, 5, 2, -7; 7, 2, -8, 1, 10; 9, 1, 3, -2, 9; 6, 5, -4, 3, -2]
B := [90; 12; 51; 32; 87]
X := lsolve(A, B)
X = [5.73538; 5.75069; -0.644454; 6.27985; -1.20845]
ORIGIN := 1
A := [
    5.6, 7.2, 9.8, 3.9, 3.4;
    4.5, 7.9, 0, -2.1, 6.75;
    54.2, 76.45, 32.23, 45.71, 43.43;
    65.75, 54.32, -78.32, -565.9, 32;
    5.6, 98.5, 43.7, 67.85, 4.9
]
B := [43; 12.54; 54.98; 55.5; 65.21]
X := lsolve(A, B)
X = [-4.82754; -1.33754; 6.50014; -1.33489; 6.22626]
5*x^5 + 6*x^4 + 8*x^2 + 10*x == 0
polyroots([0; 10; 8; 0; 6; 5]) = [-1.19288 - 0.137012i; -1.19288 + 0.137012i; 0; 0.592882 + 1.0177i; 0.592882 - 1.0177i]
3*x^4 - x^3 + 3*x^2 + 9*x - 4 == 0
polyroots([-4; 9; 3; -1; 3]) = [-1.2955; 0.392035; 0.618399 - 1.49762i; 0.618399 + 1.49762i]
6*x^5 - 81*x^2 + 8 == 0
polyroots([8; 0; -81; 0; 0; 6]) = [-1.18387 + 2.07406i; -1.18387 - 2.07406i; -0.31391; 0.314633; 2.36703]
M := [
    5.6, 7.2, 9.8, 3.9, 3.4;
    4.5, 7.9, 0, -2.1, 6.75;
    54.2, 76.45, 32.23, 45.71, 43.43;
    65.75, 54.32, -78.32, -565.9, 32;
    5.6, 98.5, 43.7, 67.85, 4.9
]
n := [43; 12.54; 54.98; 55.5; 65.21]
lsolve(M, n) → [-4.82753970882; -1.33754152115; 6.50013637788; -1.33489392734; 6.22625621621]
M*[x; y; z; w; v] - n solve, x, y, z, w, v; float, 4 →  # error: Неверная переменная, по которой ищется решение.
[
    5.6*x + 7.2*y + 9.8*z + 3.9*w + 3.4*v == 43;
    4.5*x + 7.9*y - 2.1*w + 6.75 == 12.54;
    54.2*x + 76.45*y + 32.23*z + 45.71*w + 43.43*v == 54.98;
    65.75*x + 54.32*y - 78.32*z - 565.9*w + 32*v == 55.5;
    5.6*x + 98.5*y + 43.7*z + 67.85*w + 4.9*v == 65.21
] solve, x, y, z, w, v; float, 4 →  # error
y(x) := 25*x^3 + ln(x)*sin(x)
y(x)
y(x) := e^(-x)*sin(x)
integral(y(x), n) → [43*e^-1*sin(1); 12.54*e^-1*sin(1); 54.98*e^-1*sin(1); 55.5*e^-1*sin(1); 65.21*e^-1*sin(1)]
y(0) + x*{
    x0 ← 0
    d/dx0(y(x0))
} + x^2*{
    x0 ← 0
    d^2/dx0^2(y(x0))
}/2 + x^3*{
    x0 ← 0
    d^3/dx0^3(y(x0))
}/6 + x^4*{
    x0 ← 0
    d^4/dx0^4(y(x0))
}/24 + x^5*{
    x0 ← 0
    d^5/dx0^5(y(x0))
}/120
